<?xml version="1.0"?>
<!-- Generated by Aero-Matic v 1

     Inputs:
                horsepower: 2700.0
                     pitch: variable
            max engine rpm: 2800
        prop diameter (ft): 13.5

     Outputs:
              max prop rpm: 1389.85
                gear ratio:    2.01
                       Cp0: 0.112045
                       Ct0: 0.261066
       static thrust (lbs): 11064.49

     Edits:
            Gear Ratio:  2.28
            Min Pitch:  15
            Max Pitch:  50
            Min RPM:    1000
            Max RPM:    1200
-->

<propeller name="prop">
  <ixx>38.2051 </ixx>
  <diameter unit="IN">162.0 </diameter>
  <numblades> 4 </numblades>
  <gearratio>2.28 </gearratio>
  <minpitch> 15 </minpitch>
  <maxpitch> 50 </maxpitch>
  <minrpm>   1000 </minrpm>
  <maxrpm>   1200 </maxrpm>
  <p_factor> 4 </p_factor>

  <table name="C_THRUST" type="internal">
      <tableData>
                -10         0       15       25       35       45       55       65       90
      -0.2      -0.1274   0.0718   0.2611   0.3198   0.3524   0.3720   0.3428   0.2937   0.0000
       0.0      -0.1893   0.0000   0.2611   0.3198   0.3524   0.3754   0.3509   0.2937   0.0000
       0.2      -0.2122   -0.0653   0.2253   0.3133   0.3475   0.3754   0.3509   0.2937   0.0000
       0.4      -0.2122   -0.1517   0.1697   0.3101   0.3410   0.3720   0.3509   0.2937   0.0000
       0.6      -0.2122   -0.2122   0.0898   0.2791   0.3263   0.3624   0.3459   0.2937   0.0000
       0.8      -0.2122   -0.2122   0.0050   0.2089   0.3167   0.3493   0.3459   0.2937   0.0000
       1.0      -0.2122   -0.2122   -0.0848   0.1274   0.3036   0.3313   0.3428   0.2937   0.0000
       1.2      -0.2122   -0.2122   -0.1747   0.0392   0.2496   0.3198   0.3428   0.2937   0.0000
       1.4      -0.2122   -0.2122   -0.2122   -0.0572   0.1796   0.3148   0.3363   0.2937   0.0000
       1.6      -0.2122   -0.2122   -0.2122   -0.1452   0.0979   0.3036   0.3297   0.2937   0.0000
       1.8      -0.2122   -0.2122   -0.2122   -0.2122   0.0164   0.2611   0.3198   0.2937   0.0000
       2.0      -0.2122   -0.2122   -0.2122   -0.2122   -0.0653   0.2039   0.3185   0.2937   0.0000
       2.2      -0.2122   -0.2122   -0.2122   -0.2122   -0.1470   0.1470   0.3133   0.2937   0.0000
       2.4      -0.2122   -0.2122   -0.2122   -0.2122   -0.2122   0.0783   0.2558   0.2937   0.0000
       2.6      -0.2122   -0.2122   -0.2122   -0.2122   -0.2122   0.0099   0.1619   0.2611   0.0000
       2.8      -0.2122   -0.2122   -0.2122   -0.2122   -0.2122   -0.0587   0.1060   0.2122   0.0000
       3.0      -0.2122   -0.2122   -0.2122   -0.2122   -0.2122   -0.1274   0.0556   0.1632   0.0000
       3.2      -0.2122   -0.2122   -0.2122   -0.2122   -0.2122   -0.1958   0.0050   0.1143   0.0000
       3.4      -0.2122   -0.2122   -0.2122   -0.2122   -0.2122   -0.2122   -0.0457   0.0653   0.0000
       3.6      -0.2122   -0.2122   -0.2122   -0.2122   -0.2122   -0.2122   -0.0963   0.0164   0.0000
       3.8      -0.2122   -0.2122   -0.2122   -0.2122   -0.2122   -0.2122   -0.1470   -0.0326   0.0000
       4.0      -0.2122   -0.2122   -0.2122   -0.2122   -0.2122   -0.2122   -0.1974   -0.0817   0.0000
       6.0      -0.2122   -0.2122   -0.2122   -0.2122   -0.2122   -0.2122   -0.2122   -0.2122   0.0000
      </tableData>
  </table>

  <table name="C_POWER" type="internal">
     <tableData>
               -10        0       15       25       35       45       55        65        90
      -0.2      0.0187   0.0373   0.1308   0.2969   0.5120   0.7283   0.8403   0.9300   0.9300
       0.0      0.0747   0.0187   0.1120   0.2768   0.4896   0.7283   0.8437   0.9300   0.9300
       0.2      0.1064   0.0299   0.1083   0.2577   0.4683   0.7283   0.8437   0.9300   0.9300
       0.4      0.1434   0.0653   0.0933   0.2375   0.4448   0.7283   0.8437   0.9300   0.9300
       0.6      0.1759   0.0989   0.0616   0.2207   0.4168   0.7137   0.8403   0.9300   0.9300
       0.8      0.2073   0.1325   0.0187   0.1871   0.3922   0.6812   0.8403   0.9300   0.9300
       1.0      0.2387   0.1647   0.0187   0.1311   0.3697   0.6465   0.8370   0.9300   0.9300
       1.2      0.2711   0.1317   -0.0616   0.0504   0.3272   0.6196   0.8314   0.9300   0.9300
       1.4      0.3025   0.2275   -0.0930   -0.0373   0.2521   0.6106   0.8213   0.9300   0.9300
       1.6      0.3339   0.2599   -0.1087   -0.1120   0.1591   0.5938   0.8034   0.8964   0.9300
       1.8      0.3664   0.2913   -0.1120   -0.1871   0.0467   0.5266   0.7787   0.8773   0.9300
       2.0      0.3978   0.3227   -0.1434   -0.2611   -0.0560   0.4482   0.7417   0.8594   0.9300
       2.2      0.4291   0.3552   -0.1759   -0.3361   -0.1681   0.3641   0.7193   0.8213   0.9300
       2.4      0.4616   0.3866   -0.2073   -0.4112   -0.2801   0.2599   0.6980   0.8034   0.9300
       2.6      0.4930   0.4179   -0.2387   -0.4852   -0.3552   0.1087   0.6812   0.7754   0.9300
       2.8      0.5244   0.4504   -0.2711   -0.5602   -0.4258   -0.0370   0.6667   0.7653   0.9300
       3.0      0.5569   0.4818   -0.3025   -0.6353   -0.5042   -0.1681   0.6443   0.7653   0.9300
       3.2      0.5882   0.5132   -0.3339   -0.7092   -0.5793   -0.2992   0.6028   0.7473   0.9300
       3.4      0.6196   0.5457   -0.3664   -0.7843   -0.6532   -0.4291   0.4672   0.7283   0.9300
       3.6      0.6521   0.5770   -0.3978   -0.8594   -0.7283   -0.5602   0.3283   0.7092   0.9300
       3.8      0.6835   0.6084   -0.4291   -0.9300   -0.8034   -0.6913   0.1826   0.6868   0.9300
       4.0      0.7148   0.6409   -0.4616   -0.9300   -0.9300   -0.8213   0.0370   0.6353   0.9300
       6.0      0.9300   0.9300   -0.9300   -0.9300   -0.9300   -0.9300   -0.9300   -0.5602   0.9300
     </tableData>
  </table>

<!--
  <table name="CT_MACH" type="internal">
     <tableData>
       0.85    1.0
       1.05    0.8
     </tableData>
  </table>

  <table name="CP_MACH" type="internal">
     <tableData>
       0.85    1.0
       1.05    1.8
       2.00    1.4
     </tableData>
  </table>
-->
</propeller>
