<?xml version="1.0"?>
<!--
  File:     eng_R-3350.xml
  Author:   Ron Jensen

  Inputs:
    name:           Wright R-3350-C18-BA Duplex-Cyclone
    type:           piston
    power:          2200.0 hp
    augmented?      no
    injected?       no

    References:
    http://en.wikipedia.org/wiki/Wright_R-3350
    Supercharger data is fantasy.


-->

<piston_engine name="R-3350-C18-BA">
  <minmp unit="INHG">         6.5  </minmp>	<!-- Deprecated -->
  <maxmp unit="INHG">        56.0 </maxmp>
  <displacement unit="IN3">3347.0  </displacement>
  <maxhp>                  2200.0  </maxhp>
  <bore unit="IN"> 6.125 </bore>
  <stroke unit="IN"> 6.312 </stroke>
  <cylinders> 18 </cylinders>
  <compression-ratio> 6.85 </compression-ratio>
  <bsfc>                      0.4  </bsfc>
  <volumetric-efficiency>     0.775  </volumetric-efficiency>
  <cycles>                    4.0  </cycles>
  <idlerpm>                 550.0  </idlerpm>
  <maxrpm>                 2800.0  </maxrpm>
  <maxthrottle>               1.0  </maxthrottle>
  <minthrottle>               0.1  </minthrottle>
  <sparkfaildrop>             0.2  </sparkfaildrop>
  <numboostspeeds> 2   </numboostspeeds>
  <boostoverride>  0   </boostoverride>

  <ratedboost1>    8.15</ratedboost1> <!-- 46.5 inHg -->
  <ratedpower1> 1900   </ratedpower1>
  <ratedrpm1>   2600   </ratedrpm1>
  <ratedaltitude1> 4900 </ratedaltitude1>

  <ratedboost2>    7.41</ratedboost2> <!-- 45 inHg -->
  <ratedpower2> 1600   </ratedpower2>
  <ratedrpm2>   2600   </ratedrpm2>
  <ratedaltitude2> 16200 </ratedaltitude2>

  <takeoffboost> 10.85    </takeoffboost>   <!-- 52.0 inHg -->
</piston_engine>
