<?xml version="1.0"?>
<?xml-stylesheet type="text/xsl" href="http://jsbsim.sourceforge.net/JSBSim.xsl"?>
<fdm_config name="skyraider" version="2.0" release="ALPHA"
   xmlns:xsi="http://www.w3.org/2001/XMLSchema-instance"
   xsi:noNamespaceSchemaLocation="http://jsbsim.sourceforge.net/JSBSim.xsd">

 <fileheader>
  <author> Aeromatic v 0.9, David Culp </author>
  <filecreationdate> now </filecreationdate>
  <version> 0.0 </version>
  <description> Models a Douglass A-1H Skyraider. </description>
 </fileheader>


 <metrics>
   <wingarea  unit="FT2">  400.30 </wingarea>
   <wingspan  unit="FT" >   50.00 </wingspan>
   <wing_incidence>          2.00 </wing_incidence>
   <chord     unit="FT" >    8.01 </chord>
   <htailarea unit="FT2">   56.22 </htailarea>
   <htailarm  unit="FT" >   25.60 </htailarm>
   <vtailarea unit="FT2">   44.78 </vtailarea>
   <vtailarm  unit="FT" >   26.60 </vtailarm>
   <location name="AERORP" unit="IN">
     <x> 125.00 </x>
     <y>   0.00 </y>
     <z>   0.00 </z>
   </location>
   <location name="EYEPOINT" unit="IN">
     <x> 120.96 </x>
     <y>   0.00 </y>
     <z>  40.00 </z>
   </location>
   <location name="VRP" unit="IN">
     <x>124</x>
     <y>0</y>
     <z>-10</z>
   </location>
 </metrics>

 <mass_balance>

   <ixx unit="SLUG*FT2">     18132 </ixx>
   <iyy unit="SLUG*FT2">     32259 </iyy>
   <izz unit="SLUG*FT2">     49245 </izz>
   <ixy unit="SLUG*FT2">         0 </ixy>
   <ixz unit="SLUG*FT2">         0 </ixz>
   <iyz unit="SLUG*FT2">         0 </iyz>
   <emptywt unit="LBS" >     11968 </emptywt>
   <location name="CG" unit="IN">
     <x> 126.00 </x>
     <y>   0.00 </y>
     <z> -10.00 </z>
   </location>

   <pointmass name="station1"><!-- rocket -->
      <weight unit="LBS"> 100 </weight>
      <location name="POINTMASS" unit="IN">
          <x>  126 </x>
          <y> -210 </y>
          <z>    0 </z>
      </location>
   </pointmass>
   <pointmass name="station2"><!-- rocket -->
      <weight unit="LBS"> 100 </weight>
      <location name="POINTMASS" unit="IN">
          <x>  126 </x>
          <y> -200 </y>
          <z>   -2 </z>
      </location>
   </pointmass>
   <pointmass name="station3"><!-- rocket -->
      <weight unit="LBS"> 100 </weight>
      <location name="POINTMASS" unit="IN">
          <x>  126 </x>
          <y> -190 </y>
          <z>   -4 </z>
      </location>
   </pointmass>
   <pointmass name="station4"><!-- rocket -->
      <weight unit="LBS"> 100 </weight>
      <location name="POINTMASS" unit="IN">
          <x>  126 </x>
          <y> -180 </y>
          <z>   -6 </z>
      </location>
   </pointmass>
   <pointmass name="station5"><!-- 4x rocket pod -->
      <weight unit="LBS"> 450 </weight>
      <location name="POINTMASS" unit="IN">
          <x>  126 </x>
          <y> -160 </y>
          <z>   -8 </z>
      </location>
   </pointmass>
   <pointmass name="station6"><!-- 4x rocket pod -->
      <weight unit="LBS"> 450 </weight>
      <location name="POINTMASS" unit="IN">
          <x>  126 </x>
          <y> -140 </y>
          <z>  -10 </z>
      </location>
   </pointmass>
   <pointmass name="station7"><!-- empty 150gal fuel tank -->
      <weight unit="LBS"> 130 </weight>
      <location name="POINTMASS" unit="IN">
          <x>  120 </x>
          <y> -118 </y>
          <z>  -14 </z>
      </location>
   </pointmass>
   <pointmass name="station8"><!-- 500lb bomb -->
      <weight unit="LBS"> 550 </weight>
      <location name="POINTMASS" unit="IN">
          <x>  126 </x>
          <y>    0 </y>
          <z>  -30 </z>
      </location>
   </pointmass>
   <pointmass name="station9"><!-- empty 150 gal fuel tank -->
      <weight unit="LBS"> 130 </weight>
      <location name="POINTMASS" unit="IN">
          <x>  120 </x>
          <y>  118 </y>
          <z>  -14 </z>
      </location>
   </pointmass>
   <pointmass name="station10"><!-- 4x rocket pod -->
      <weight unit="LBS"> 450 </weight>
      <location name="POINTMASS" unit="IN">
          <x>  126 </x>
          <y>  140 </y>
          <z>  -10 </z>
      </location>
   </pointmass>
   <pointmass name="station11"><!-- 4x rocket pod -->
      <weight unit="LBS"> 450 </weight>
      <location name="POINTMASS" unit="IN">
          <x>  126 </x>
          <y>  160 </y>
          <z>   -8 </z>
      </location>
   </pointmass>
   <pointmass name="station12"><!-- rocket -->
      <weight unit="LBS"> 100 </weight>
      <location name="POINTMASS" unit="IN">
          <x>  126 </x>
          <y>  180 </y>
          <z>   -6 </z>
      </location>
   </pointmass>
   <pointmass name="station13"><!-- rocket -->
      <weight unit="LBS"> 100 </weight>
      <location name="POINTMASS" unit="IN">
          <x>  126 </x>
          <y>  190 </y>
          <z>   -4 </z>
      </location>
   </pointmass>
   <pointmass name="station14"><!-- rocket -->
      <weight unit="LBS"> 100 </weight>
      <location name="POINTMASS" unit="IN">
          <x>  126 </x>
          <y>  200 </y>
          <z>   -2 </z>
      </location>
   </pointmass>
   <pointmass name="station15"><!-- rocket -->
      <weight unit="LBS"> 100 </weight>
      <location name="POINTMASS" unit="IN">
          <x>  126 </x>
          <y>  210 </y>
          <z>    0 </z>
      </location>
   </pointmass>

 </mass_balance>

 <ground_reactions>

  <contact type="BOGEY" name="LEFT_MAIN">
   <location unit="IN">
     <x>  95.00 </x>
     <y> -85.00 </y>
     <z> -98.00 </z>
   </location>
   <static_friction>  0.80 </static_friction>
   <dynamic_friction> 0.50 </dynamic_friction>
   <rolling_friction> 0.02 </rolling_friction>
   <spring_coeff unit="LBS/FT">      18000.00 </spring_coeff>
   <damping_coeff unit="LBS/FT/SEC"> 12000.00 </damping_coeff>
   <brake_group>LEFT</brake_group>
   <retractable>1</retractable>
 </contact>

  <contact type="BOGEY" name="RIGHT_MAIN">
   <location unit="IN">
     <x>  95.00 </x>
     <y>  85.00 </y>
     <z> -98.00 </z>
   </location>
   <static_friction>  0.80 </static_friction>
   <dynamic_friction> 0.50 </dynamic_friction>
   <rolling_friction> 0.02 </rolling_friction>
   <spring_coeff unit="LBS/FT">      18000.00 </spring_coeff>
   <damping_coeff unit="LBS/FT/SEC"> 12000.00 </damping_coeff>
   <brake_group>RIGHT</brake_group>
   <retractable>1</retractable>
 </contact>

  <contact type="BOGEY" name="TAIL">
   <location unit="IN">
     <x> 352.00 </x>
     <y>   0.00 </y>
     <z> -51.00 </z>
   </location>
   <static_friction>  0.85 </static_friction>
   <dynamic_friction> 0.60 </dynamic_friction>
   <rolling_friction> 0.03 </rolling_friction>
   <spring_coeff unit="LBS/FT">      10000.00 </spring_coeff>
   <damping_coeff unit="LBS/FT/SEC"> 10000.00 </damping_coeff>
   <max_steer unit="DEG"> -60.00 </max_steer>
   <brake_group>NONE</brake_group>
   <retractable>1</retractable>
 </contact>

  <contact type="STRUCTURE" name="LEFT_WING">
    <location unit="IN">
     <x> 172.80 </x>
     <y> -300 </y>
     <z> -10.80 </z>
    </location>
    <static_friction>  0.80 </static_friction>
    <dynamic_friction> 0.50 </dynamic_friction>
    <spring_coeff unit="LBS/FT">       8000.00 </spring_coeff>
    <damping_coeff unit="LBS/FT/SEC">  8000.00 </damping_coeff>
 </contact>

  <contact type="STRUCTURE" name="RIGHT_WING">
    <location unit="IN">
     <x> 172.80 </x>
     <y>  300 </y>
     <z> -10.80 </z>
    </location>
    <static_friction>  0.80 </static_friction>
    <dynamic_friction> 0.50 </dynamic_friction>
    <spring_coeff unit="LBS/FT">       8000.00 </spring_coeff>
    <damping_coeff unit="LBS/FT/SEC">  8000.00 </damping_coeff>
 </contact>

  <contact type="STRUCTURE" name="NOSE">
    <location unit="IN">
     <x>   0 </x>
     <y>   0 </y>
     <z> -20 </z>
    </location>
    <static_friction>  0.80 </static_friction>
    <dynamic_friction> 0.50 </dynamic_friction>
    <spring_coeff unit="LBS/FT">       8000.00 </spring_coeff>
    <damping_coeff unit="LBS/FT/SEC">  8000.00 </damping_coeff>
 </contact>

 </ground_reactions>

 <propulsion>

   <engine file="eng_R-3350">
    <location unit="IN">
      <x>  36.00 </x>
      <y>   0.00 </y>
      <z>   0.00 </z>
    </location>
    <feed>0</feed>
    <feed>1</feed>
    <feed>2</feed>
    <feed>3</feed>
    <feed>4</feed>
    <thruster file="R3350_prop">
     <location unit="IN">
       <x>   0.00 </x>
       <y>   0.00 </y>
       <z>   0.00 </z>
     </location>
     <orient unit="DEG">
       <pitch> 0.00 </pitch>
       <roll>  0.00 </roll>
       <yaw>   0.00 </yaw>
     </orient>
    </thruster>
  </engine>


  <tank type="FUEL" number="0"><!-- left wing -->
     <location unit="IN">
       <x> 126.00 </x>
       <y>-100.00 </y>
       <z> -10.00 </z>
     </location>
     <priority>2</priority>
     <density unit="LBS/GAL"> 6.0 </density>
     <capacity unit="LBS"> 1000.00 </capacity>
     <contents unit="LBS"> 1000.00 </contents>
  </tank>

  <tank type="FUEL" number="1"><!-- right wing -->
     <location unit="IN">
       <x> 126.00 </x>
       <y> 100.00 </y>
       <z> -10.00 </z>
     </location>
     <priority>2</priority>
     <density unit="LBS/GAL"> 6.0 </density>
     <capacity unit="LBS"> 1000.00 </capacity>
     <contents unit="LBS"> 1000.00 </contents>
  </tank>

  <tank type="FUEL" number="2"><!-- left wing drop tank -->
     <location unit="IN">
       <x> 126.00 </x>
       <y>-120.00 </y>
       <z> -24.00 </z>
     </location>
     <density unit="LBS/GAL"> 6.0 </density>
     <capacity unit="LBS"> 1000.00 </capacity>
     <contents unit="LBS"> 960 </contents>
  </tank>

  <tank type="FUEL" number="3"><!-- right wing drop tank -->
     <location unit="IN">
       <x> 126.00 </x>
       <y> 120.00 </y>
       <z> -24.00 </z>
     </location>
     <density unit="LBS/GAL"> 6.0 </density>
     <capacity unit="LBS"> 1000.00 </capacity>
     <contents unit="LBS"> 960 </contents>
  </tank>

  <tank type="FUEL" number="4"><!-- centerline 300 gallon drop tank -->
     <location unit="IN">
       <x> 126.00 </x>
       <y>   0.00 </y>
       <z> -28.00 </z>
     </location>
     <density unit="LBS/GAL"> 6.0 </density>
     <capacity unit="LBS"> 2000.00 </capacity>
     <contents unit="LBS"> 0 </contents>
  </tank>

 </propulsion>

 <system file="gear"/>
 <system file="flaps"/>
 <system file="FCS-pitch"/>
 <system file="FCS-roll"/>
 <system file="FCS-yaw"/>
 <system file="NWS"/>
 <system file="alpha_buffet"/>
 <system file="dump"/>
 <system file="crash-detect"/>
 <system file="armament"/>
 <system file="hook"/>
 <system file="holdback"/>
 <system file="catapult"/>
 <system file="cat_workaround"/>
 <system file="particles"/>
 <system file="wing-fold"/>
 <system file="speedbrakes"/>
 <system file="beacon"/>
 <system file="beacon2"/>
 <system file="canopy"/>
 <system file="automixture"/>


 <flight_control name="FCS"/>

 <aerodynamics>

    <function name="aero/qbar_tail-psf">
      <description>Thrust tube effects at tail</description>
      <sum>
          <property>aero/qbar-psf</property>
          <product>
            <property>forces/fbx-prop-lbs</property>
            <value>0.001</value>
          </product>
      </sum>
    </function>

  <axis name="LIFT">

    <function name="aero/coefficient/CLalpha">
      <description>Lift_due_to_alpha</description>
      <product>
          <property>aero/qbar-psf</property>
          <property>metrics/Sw-sqft</property>
          <table>
            <independentVar lookup="row">aero/alpha-rad</independentVar>
            <tableData>
              -0.20 -0.730
               0.00  0.180
               0.23  1.150
               0.60  0.382
            </tableData>
          </table>
      </product>
    </function>

    <function name="aero/coefficient/dCLflap">
       <description>Delta_Lift_due_to_flaps</description>
       <product>
           <property>aero/qbar-psf</property>
           <property>metrics/Sw-sqft</property>
           <property>fcs/flap-pos-norm</property>
           <value> 0.42 </value>
       </product>
    </function>

    <function name="aero/coefficient/CLde">
       <description>Lift_due_to_Elevator_Deflection</description>
       <product>
           <property>aero/qbar-psf</property>
           <property>metrics/Sw-sqft</property>
           <property>fcs/elevator-pos-rad</property>
           <value>0.1</value>
       </product>
    </function>

    <function name="aero/coefficient/buffet">
       <description>Buffet at high alpha</description>
         <product>
           <property>systems/alpha_buffet/sine_wave</property>
           <property>systems/alpha_buffet/strength</property>
         </product>
    </function>

  </axis>

  <axis name="DRAG">

    <function name="aero/coefficient/CD0">
       <description>Drag_at_zero_lift</description>
       <product>
          <property>aero/qbar-psf</property>
          <property>metrics/Sw-sqft</property>
          <table>
            <independentVar lookup="row">aero/alpha-rad</independentVar>
            <tableData>
             -1.57    1.500
             -0.26    0.026
              0.00    0.021
              0.26    0.026
              1.57    1.500
            </tableData>
          </table>
       </product>
    </function>

    <function name="aero/coefficient/CDi">
       <description>Induced_drag</description>
         <product>
           <property>aero/qbar-psf</property>
           <property>metrics/Sw-sqft</property>
           <property>aero/cl-squared</property>
           <value>0.05</value>
         </product>
    </function>

    <function name="aero/coefficient/CDmach">
       <description>Drag_due_to_mach</description>
        <product>
          <property>aero/qbar-psf</property>
          <property>metrics/Sw-sqft</property>
          <table>
            <independentVar lookup="row">velocities/mach</independentVar>
            <tableData>
                0.00      0.000
                0.73      0.000
                1.10      0.023
                1.80      0.015
            </tableData>
          </table>
        </product>
    </function>

    <function name="aero/coefficient/CDflap">
       <description>Drag_due_to_flaps</description>
         <product>
           <property>aero/qbar-psf</property>
           <property>metrics/Sw-sqft</property>
           <property>fcs/flap-pos-norm</property>
          <table>
            <independentVar lookup="row">fcs/flap-pos-norm</independentVar>
            <tableData>
                0.5      0.01
                1.0      0.03
            </tableData>
          </table>
         </product>
    </function>

    <function name="aero/coefficient/CDgear">
       <description>Drag_due_to_gear</description>
         <product>
           <property>aero/qbar-psf</property>
           <property>metrics/Sw-sqft</property>
           <property>gear/gear-pos-norm</property>
           <value>0.03</value>
         </product>
    </function>

    <function name="aero/coefficient/CDbeta">
       <description>Drag_due_to_sideslip</description>
       <product>
          <property>aero/qbar-psf</property>
          <property>metrics/Sw-sqft</property>
          <table>
            <independentVar lookup="row">aero/beta-rad</independentVar>
            <tableData>
              -1.57    1.230
              -0.26    0.050
               0.00    0.000
               0.26    0.050
               1.57    1.230
            </tableData>
          </table>
       </product>
    </function>

    <function name="aero/coefficient/CDde">
       <description>Drag_due_to_Elevator_Deflection</description>
       <product>
           <property>aero/qbar-psf</property>
           <property>metrics/Sw-sqft</property>
           <abs><property>fcs/elevator-pos-norm</property></abs>
           <value>0.04</value>
       </product>
    </function>

    <function name="aero/coefficient/CDsb">
       <description>Drag_due_to_speedbrakes</description>
         <product>
           <property>aero/qbar-psf</property>
           <property>metrics/Sw-sqft</property>
           <property>fcs/speedbrake-pos-norm</property>
           <value>0.065</value>
         </product>
    </function>

    <function name="aero/coefficient/CDsbv">
       <description>Drag_due_to_ventral_speedbrake</description>
         <product>
           <property>aero/qbar-psf</property>
           <property>metrics/Sw-sqft</property>
           <property>systems/speedbrakes/ventral-pos-norm</property>
           <value>0.03</value>
         </product>
    </function>

  </axis>

  <axis name="SIDE">

    <function name="aero/coefficient/CYb">
       <description>Side_force_due_to_beta</description>
       <product>
           <property>aero/qbar-psf</property>
           <property>metrics/Sw-sqft</property>
           <property>aero/beta-rad</property>
           <value>-1</value>
       </product>
    </function>

  </axis>

  <axis name="ROLL">

    <function name="aero/coefficient/Clb">
       <description>Roll_moment_due_to_beta</description>
       <product>
           <property>aero/qbar-psf</property>
           <property>metrics/Sw-sqft</property>
           <property>metrics/bw-ft</property>
           <property>aero/beta-rad</property>
           <value>-0.1</value>
           <table>
             <independentVar lookup="row">aero/alpha-deg</independentVar>
             <tableData>
               13.0     1.0
               14.0     10.0
             </tableData>
           </table>
       </product>
    </function>

    <function name="aero/coefficient/Clp">
       <description>Roll_moment_due_to_roll_rate</description>
       <product>
           <property>aero/qbar-psf</property>
           <property>metrics/Sw-sqft</property>
           <property>metrics/bw-ft</property>
           <property>aero/bi2vel</property>
           <property>velocities/p-aero-rad_sec</property>
           <value>-0.4</value>
       </product>
    </function>

    <function name="aero/coefficient/Clr">
       <description>Roll_moment_due_to_yaw_rate</description>
       <product>
           <property>aero/qbar-psf</property>
           <property>metrics/Sw-sqft</property>
           <property>metrics/bw-ft</property>
           <property>aero/bi2vel</property>
           <property>velocities/r-aero-rad_sec</property>
           <value>0.1</value>
           <table>
             <independentVar lookup="row">aero/alpha-deg</independentVar>
             <tableData>
               13.0     1.0
               14.0     20.0
             </tableData>
           </table>
       </product>
    </function>

    <function name="aero/coefficient/Clda">
       <description>Roll_moment_due_to_aileron</description>
       <product>
          <property>aero/qbar-psf</property>
          <property>metrics/Sw-sqft</property>
          <property>metrics/bw-ft</property>
          <property>fcs/left-aileron-pos-rad</property>
          <value>0.16</value>
          <table>
            <independentVar lookup="row">aero/alpha-deg</independentVar>
            <tableData>
              13.0     1.0
              14.0     0.3
            </tableData>
          </table>
       </product>
    </function>

    <function name="aero/coefficient/Cldr">
       <description>Roll_moment_due_to_rudder</description>
       <product>
           <property>aero/qbar-psf</property>
           <property>metrics/Sw-sqft</property>
           <property>metrics/bw-ft</property>
           <property>fcs/rudder-pos-rad</property>
           <value>0.005</value>
       </product>
    </function>

  </axis>

  <axis name="PITCH">

    <function name="aero/coefficient/Cmalpha">
       <description>Pitch_moment_due_to_alpha</description>
       <product>
           <property>aero/qbar-psf</property>
           <property>metrics/Sw-sqft</property>
           <property>metrics/cbarw-ft</property>
           <property>aero/alpha-rad</property>
           <value>-0.5</value>
       </product>
    </function>

    <function name="aero/coefficient/Cmde">
       <description>Pitch_moment_due_to_elevator</description>
       <product>
          <property>aero/qbar_tail-psf</property>
          <property>metrics/Sw-sqft</property>
          <property>metrics/cbarw-ft</property>
          <property>fcs/elevator-pos-rad</property>
          <value>-0.6</value>
       </product>
    </function>

    <function name="aero/coefficient/Cmq">
       <description>Pitch_moment_due_to_pitch_rate</description>
       <product>
           <property>aero/qbar-psf</property>
           <property>metrics/Sw-sqft</property>
           <property>metrics/cbarw-ft</property>
           <property>aero/ci2vel</property>
           <property>velocities/q-aero-rad_sec</property>
           <value>-18</value>
       </product>
    </function>

    <function name="aero/coefficient/Cmadot">
       <description>Pitch_moment_due_to_alpha_rate</description>
       <product>
           <property>aero/qbar-psf</property>
           <property>metrics/Sw-sqft</property>
           <property>metrics/cbarw-ft</property>
           <property>aero/ci2vel</property>
           <property>aero/alphadot-rad_sec</property>
           <value>-9</value>
       </product>
    </function>

  </axis>

  <axis name="YAW">

    <function name="aero/coefficient/Cnb">
       <description>Yaw_moment_due_to_beta</description>
       <product>
           <property>aero/qbar-psf</property>
           <property>metrics/Sw-sqft</property>
           <property>metrics/bw-ft</property>
           <property>aero/beta-rad</property>
           <value>0.11</value>
       </product>
    </function>

    <function name="aero/coefficient/Cnr">
       <description>Yaw_moment_due_to_yaw_rate</description>
       <product>
           <property>aero/qbar-psf</property>
           <property>metrics/Sw-sqft</property>
           <property>metrics/bw-ft</property>
           <property>aero/bi2vel</property>
           <property>velocities/r-aero-rad_sec</property>
           <value>-0.15</value>
       </product>
    </function>

    <function name="aero/coefficient/Cndr">
       <description>Yaw_moment_due_to_rudder</description>
       <product>
           <property>aero/qbar-psf</property>
           <property>metrics/Sw-sqft</property>
           <property>metrics/bw-ft</property>
           <property>fcs/rudder-pos-rad</property>
           <value>-0.02</value>
       </product>
    </function>

    <function name="aero/coefficient/Cni">
       <description>Yaw_moment_due_to_vertical_stab_incidence</description>
       <product>
           <property>aero/qbar-psf</property>
           <property>metrics/Sw-sqft</property>
           <property>metrics/bw-ft</property>
           <value>-0.001</value>
       </product>
    </function>

    <function name="aero/coefficient/Cnda">
       <description>Adverse_yaw</description>
       <product>
           <property>aero/qbar-psf</property>
           <property>metrics/Sw-sqft</property>
           <property>metrics/bw-ft</property>
           <property>fcs/left-aileron-pos-rad</property>
           <value>-0.003</value>
       </product>
    </function>

  </axis>

 </aerodynamics>

 <external_reactions>

  <force name="catapult" frame="LOCAL">
   <location unit="IN">
     <x>  100.0 </x>
     <y>    0.0 </y>
     <z>  -38.0 </z>
   </location>
   <direction>
     <x>   -0.9612617 </x>
     <y>   -0.2756374 </y>
     <z>    0.0 </z>
   </direction>
  </force>

  <force name="holdback" frame="BODY">
   <location unit="IN">
     <x>  100.0 </x>
     <y>    0.0 </y>
     <z>  -40.0 </z>
   </location>
   <direction>
     <x>   -0.990 </x>
     <y>    0     </y>
     <z>   -0.139 </z>
   </direction>
  </force>

  <force name="hook" frame="BODY">
   <location unit="IN">
     <x>  360.0 </x>
     <y>    0.0 </y>
     <z>  -12.0 </z>
   </location>
   <direction>
     <x>  -0.9995 </x>
     <y>   0.0    </y>
     <z>   0.01 </z>
   </direction>
  </force>

 </external_reactions>

</fdm_config>
